OpenVSP model (file version 5), 1 components.
Geometry view with OpenVSP parameter names; values to 6 digits, angles in degrees, lengths in the model's unit.
Overall bounding box: X_Min=-0.00249197 X_Len=0.00401788 Y_Min=-0.139692 Y_Len=0.393692 Z_Min=-0.227045 Z_Len=0.452074

Propeller "propeller"
  location (X Y Z) 0 0 0, rotation 0 0 0
  bounding box size 0.00401788 0.393692 0.452074
  Design: Diameter=0.508 NumBlade=3 Beta34=0 UseBeta34Flag=0 Feather=0 Rotate=0 Precone=0 ReverseFlag=0 FoldAngle=0 PropMode=0 AF=78 CLi=0.538798 Chord=0.1 Solidity=0.095493 ConstructXoC=0 FeatherAxisXoC=0 FeatherOffsetXoC=0
  cross sections:
    n   RadiusFrac  shape
    0   0.2         airfoil file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 BaseThickChord=0.120265 Chord=0.0254 ThickChord=0.120265
    1   0.205455    as above
    2   0.221673    as above
    3   0.24821     as above
    4   0.284344    as above
    5   0.329087    as above
    6   0.381221    as above
    7   0.439322    as above
    8   0.501806    as above
    9   0.566968    as above
    10  0.633032    as above
    11  0.698194    as above
    12  0.760678    as above
    13  0.818779    as above
    14  0.870913    as above
    15  0.915656    as above
    16  0.95179     as above
    17  0.978327    as above
    18  0.994545    as above
    19  1           as above
  Chord along r/R (cubic Bezier): 0.2: 0.1, 0.466667: 0.1, 0.733333: 0.1, 1: 0.1
  Sweep along r/R (cubic Bezier): 0.2: 0, 0.266667: 0.00190383, 0.333333: 0.00919682, 0.4: 0.0133281, 0.466667: 0.0174594, 0.533333: 0.0213977, 0.6: 0.025297, 0.733333: 0.0330955, 0.866667: 0.0456124, 1: 0.0480472
  Thick along r/R (PCHIP): 0.2: 0.120265, 0.205455: 0.120265, 0.221673: 0.120265, 0.24821: 0.120265, 0.284344: 0.120265, 0.329087: 0.120265, 0.381221: 0.120265, 0.439322: 0.120265, 0.501806: 0.120265, 0.566968: 0.120265, 0.633032: 0.120265, 0.698194: 0.120265, 0.760678: 0.120265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
  CLI along r/R (cubic Bezier): 0.2: 0, 0.266667: 0.7, 0.333333: 0.7, 0.4: 0.7, 0.466667: 0.7, 0.533333: 0.7, 0.6: 0.7, 0.733333: 0.7, 0.866667: 0.7, 1: 0.2
  Axial along r/R (cubic Bezier): 0.2: 0.00310393, 0.333333: 0.00308541, 0.466667: 0.00286844, 0.6: 0.00237396, 0.666667: 0.00212671, 0.733333: 0.00180552, 0.8: 0.00140282, 0.866667: 0.00100012, 0.933333: 0.000161372, 1: 6.87274e-05
  Tangential along r/R (cubic Bezier): 0.2: -0.0421127, 0.466667: -0.0421127, 0.733333: -0.0421127, 1: -0.0421127
